<?xml version="1.0"?>

<!--
  File:     AE300.xml
  Author:   AeromatiC++ v 3.3.10

  See: http://wiki.flightgear.org/JSBSim_Engines#FGPiston

  Inputs:
    name:           AE300
    type:           Piston Engine
    power:          165.613 hp
-->

<piston_engine name="AE300">
  <minmp unit="INHG"> 10.0 </minmp>
  <maxmp unit="INHG"> 28.5 </maxmp>
  <displacement unit="IN3"> 121.5 </displacement>
  <maxhp>        165.613 </maxhp>
  <cycles>         4.0 </cycles>
  <idlerpm>      700.0 </idlerpm>
  <maxrpm>      4225.0 </maxrpm> <!-- AFM 2.4 c) max. overspeed 2500RPM (prop) * 1.69 gear ratio -->
  <sparkfaildrop>  0.1 </sparkfaildrop>
  <man-press-lag> 0.1 </man-press-lag>
  <static-friction  unit="HP"> 0.828067 </static-friction>
  <starter-torque> 132.491 </starter-torque>
  <starter-rpm> 1400 </starter-rpm>

  <!--
    volumetric-efficiency and bsfc are overriden at runtime in da40-engine.xml
  -->
  <volumetric-efficiency> 1.18 </volumetric-efficiency> <!-- Tunes fuel flow. Overriden at runtime in da40-engine.xml. See AFM 5.3.2 Fuel Flow -->
  <bsfc unit="LBS/HP*HR"> 0.33 </bsfc> <!-- Tunes continuous power. Overriden at runtime in da40-engine.xml. 165hp from 0-10000ft then decreasing linear to 135hp@18000ft -->

  <stroke unit="IN">  3.600 </stroke>
  <bore unit="IN">    3.300 </bore>
  <cylinders>         4  </cylinders>
  <compression-ratio>  8.0 </compression-ratio>

  <!--numboostspeeds> 1 </numboostspeeds-->

  <!--ratedpower1>165.6</ratedpower1-->
  <!--ratedboost1>30</ratedboost1-->
  <!--ratedaltitude1>10000</ratedaltitude1-->
  <!--ratedrpm1>2800</ratedrpm1-->

  <!--ratedpower2>135</ratedpower2-->
  <!--  <ratedboost2>30</ratedboost2>-->
  <!--ratedaltitude2>18000</ratedaltitude2-->
  <!--ratedrpm2>2100</ratedrpm2-->

</piston_engine>
